Clear

!
! This script is based on a script developed by Tennessee Tech Univ students
! Tyler Patton, Jon Wood, and David Woods, April 2009
!

new circuit.IEEE13Nodeckt
~ basekv=115 pu=1.02 phases=3 bus1=SourceBus
~ Angle=30                                                         ! advance angle 30 deg so result agree with published angle
~ MVAsc3=20000 MVASC1=21000    ! stiffen the source to approximate inf source


!SUB TRANSFORMER DEFINITION
! Although this data was given, it does not appear to be used in the test case results
! The published test case starts at 1.0 per unit at Bus 650. To make this happen, we will change the impedance
! on the transformer to something tiny by dividing by 1000 using the dss in-line RPN math

/*

New Transformer.Sub Phases=3 Windings=2   XHL=(8 1000 /)
~ wdg=1 bus=SourceBus   conn=delta  kv=115  kva=5000   %r=(.5 1000 /)  XHT=4
~ wdg=2 bus=650             conn=wye    kv=4.16  kva=5000   %r=(.5 1000 /)   XLT=4

New Transformer.Reg1 phases=1 XHL=0.01 kVAs=[1666 1666]
~ Buses=[650.1 RG60.1] kVs=[2.4  2.4] %LoadLoss=0.01

New Transformer.Reg2 phases=1 XHL=0.01 kVAs=[1666 1666]
~ Buses=[650.2 RG60.2] kVs=[2.4  2.4] %LoadLoss=0.01


New Transformer.Reg3 phases=1 XHL=0.01 kVAs=[1666 1666]
~ Buses=[650.3 RG60.3] kVs=[2.4  2.4] %LoadLoss=0.01

New Transformer.XFM1  Phases=3   Windings=2  XHL=2
~ wdg=1 bus=633       conn=Wye kv=4.16    kva=500    %r=.55     XHT=1
~ wdg=2 bus=634       conn=Wye kv=0.480    kva=500    %r=.55   XLT=1


new regcontrol.Reg1  transformer=Reg1 winding=2  vreg=122  band=2  ptratio=20 ctprim=700  R=3   X=9
new regcontrol.Reg2  transformer=Reg2 winding=2  vreg=122  band=2  ptratio=20 ctprim=700  R=3   X=9
new regcontrol.Reg3  transformer=Reg3 winding=2  vreg=122  band=2  ptratio=20 ctprim=700  R=3   X=9

*/


new XfmrCode.sub_equipment Phases=3 Windings=2 Conns=(delta, wye) kVs=[115.00000000000001, 4.16] kVAs=[5000.0, 5000.0] %Rs=[0.0005, 0.0005]  X12=0.008 X23=0.008
new XfmrCode.xfm1_equipment Phases=3 Windings=2 Conns=(wye, wye) kVs=[4.16, 0.48] kVAs=[500.0, 500.0] %Rs=[0.55, 0.55]  X12=2.0 X23=2.0

new XfmrCode.reg1_equipment Phases=1 Windings=2 Conns=(wye, wye) kVs=[2.4, 2.4] kVAs=[1666.0, 1666.0] %LoadLoss=0.010000000135416666 %NoLoadLoss=0.0 X12=1.0 X23=1.0
new XfmrCode.reg2_equipment Phases=1 Windings=2 Conns=(wye, wye) kVs=[2.4, 2.4] kVAs=[1666.0, 1666.0] %LoadLoss=0.010000000135416666 %NoLoadLoss=0.0 X12=1.0 X23=1.0
new XfmrCode.reg3_equipment Phases=1 Windings=2 Conns=(wye, wye) kVs=[2.4, 2.4] kVAs=[1666.0, 1666.0] %LoadLoss=0.010000000135416666 %NoLoadLoss=0.0 X12=1.0 X23=1.0

new Transformer.sub Phases=3 Windings=2 Buses=(sourcebus.1.2.3, 650.1.2.3) XfmrCode=sub_equipment
new Transformer.reg1 Phases=1 Windings=2 Buses=(650.1, rg60.1) XfmrCode=reg1_equipment
new Transformer.reg2 Phases=1 Windings=2 Buses=(650.2, rg60.2) XfmrCode=reg2_equipment
new Transformer.reg3 Phases=1 Windings=2 Buses=(650.3, rg60.3) XfmrCode=reg3_equipment
new Transformer.xfm1 Phases=3 Windings=2 Buses=(633.1.2.3, 634.1.2.3) XfmrCode=xfm1_equipment

new RegControl.reg1 Transformer=reg1 VReg=122.0 Band=2.0 PTRatio=20.0 CTPrim=700.0 R=3.0 X=9.0 Bus=rg60.1 Reversible=False TapDelay=15.0 MaxTapChange=5
new RegControl.reg2 Transformer=reg2 VReg=122.0 Band=2.0 PTRatio=20.0 CTPrim=700.0 R=3.0 X=9.0 Bus=rg60.2 Reversible=False TapDelay=15.0 MaxTapChange=5
new RegControl.reg3 Transformer=reg3 VReg=122.0 Band=2.0 PTRatio=20.0 CTPrim=700.0 R=3.0 X=9.0 Bus=rg60.3 Reversible=False TapDelay=15.0 MaxTapChange=5


!TRANSFORMER DEFINITION

!LINE CODES
redirect IEEELineCodes.DSS

// these are local matrix line codes
// corrected 9-14-2011

/*

New linecode.mtx601 nphases=3 BaseFreq=60
~ rmatrix = (0.3465 | 0.1560 0.3375 | 0.1580 0.1535 0.3414 )
~ xmatrix = (1.0179 | 0.5017 1.0478 | 0.4236 0.3849 1.0348 )
~ units=mi
New linecode.mtx602 nphases=3 BaseFreq=60
~ rmatrix = (0.7526 | 0.1580 0.7475 | 0.1560 0.1535 0.7436 )
~ xmatrix = (1.1814 | 0.4236 1.1983 | 0.5017 0.3849 1.2112 )
~ units=mi
New linecode.mtx603 nphases=2 BaseFreq=60
~ rmatrix = (1.3238 | 0.2066 1.3294 )
~ xmatrix = (1.3569 | 0.4591 1.3471 )
~ units=mi
New linecode.mtx604 nphases=2 BaseFreq=60
~ rmatrix = (1.3238 | 0.2066 1.3294 )
~ xmatrix = (1.3569 | 0.4591 1.3471 )
~ units=mi
New linecode.mtx605 nphases=1 BaseFreq=60
~ rmatrix = (1.3292 )
~ xmatrix = (1.3475 )
~ units=mi

New Linecode.mtx606 nphases=3  Units=mi
~ Rmatrix=[0.791721  |0.318476  0.781649  |0.28345  0.318476  0.791721  ]
~ Xmatrix=[0.438352  |0.0276838  0.396697  |-0.0184204  0.0276838  0.438352  ]
~ Cmatrix=[383.948  |0  383.948  |0  0  383.948  ]
New linecode.mtx607 nphases=1 BaseFreq=60
~ rmatrix = (1.3425 )
~ xmatrix = (0.5124 )
~ cmatrix = [236]
~ units=mi

*/

new LineCode.mtx601 NPhases=3 Units=km RMatrix=(0.21530512000000002 0.096933906 0.098176648 |0.096933906 0.20971278 0.095380478 |0.098176648 0.095380478 0.21213613 ) XMatrix=(0.63249374 0.31174193 0.26321284 |0.31174193 0.65107274 0.23916577 |0.26321284 0.23916577 0.64299491 ) CMatrix=(1.7398393435107944 -0.37282270888779195 -0.37282270888779195 |-0.37282270888779195 1.7398393435107944 -0.37282270888779195 |-0.37282270888779195 -0.37282270888779195 1.7398393435107944 ) NormAmps=400.0
new LineCode.mtx602 NPhases=3 Units=km RMatrix=(0.46764396 0.098176648 0.096933906 |0.098176648 0.46447497 0.095380478 |0.096933906 0.095380478 0.46205162 ) XMatrix=(0.7340879299999999 0.26321284 0.31174193 |0.26321284 0.7445891 0.23916577 |0.31174193 0.23916577 0.75260479 ) CMatrix=(1.7398393435107944 -0.37282270888779195 -0.37282270888779195 |-0.37282270888779195 1.7398393435107944 -0.37282270888779195 |-0.37282270888779195 -0.37282270888779195 1.7398393435107944 ) NormAmps=400.0
new LineCode.mtx603 NPhases=2 Units=km RMatrix=(0.82257118 0.12837529 |0.12837529 0.8260508599999999 ) XMatrix=(0.84313857 0.28527151 |0.28527151 0.83704913 ) CMatrix=(1.7398393435107944 -0.37282270888779195 |-0.37282270888779195 1.7398393435107944 ) NormAmps=400.0
new LineCode.mtx606 NPhases=3 Units=km RMatrix=(0.49195262000000006 0.19789181 0.17612766000000002 |0.19789181 0.48569417 0.19789181 |0.17612766000000002 0.19789181 0.49195262000000006 ) XMatrix=(0.2723793 0.017201915999999998 -0.011445906 |0.017201915999999998 0.24649608999999997 0.017201915999999998 |-0.011445906 0.017201915999999998 0.2723793 ) CMatrix=(238.57422523473917 0.0 0.0 |0.0 238.57422523473917 0.0 |0.0 0.0 238.57422523473917 ) NormAmps=400.0
new LineCode.mtx604 NPhases=2 Units=km RMatrix=(0.82257118 0.12837529 |0.12837529 0.8260508599999999 ) XMatrix=(0.84313857 0.28527151 |0.28527151 0.83704913 ) CMatrix=(1.7398393435107944 -0.37282270888779195 |-0.37282270888779195 1.7398393435107944 ) NormAmps=400.0
new LineCode.mtx605 NPhases=1 Units=km RMatrix=(0.82592659 ) XMatrix=(0.8372976799999999 ) CMatrix=(1.7398393435107944 ) NormAmps=400.0
new LineCode.mtx607 NPhases=1 Units=km RMatrix=(0.83419083 ) XMatrix=(0.31839059999999997 ) CMatrix=(146.6436005975864 ) NormAmps=400.0


!LOAD DEFINITIONS

/*
New Load.671 Bus1=671.1.2.3  Phases=3 Conn=Delta Model=1 kV=4.16   kW=1155 kvar=660
New Load.634a Bus1=634.1     Phases=1 Conn=Wye  Model=1 kV=0.277  kW=160   kvar=110
New Load.634b Bus1=634.2     Phases=1 Conn=Wye  Model=1 kV=0.277  kW=120   kvar=90
New Load.634c Bus1=634.3     Phases=1 Conn=Wye  Model=1 kV=0.277  kW=120   kvar=90
New Load.645 Bus1=645.2       Phases=1 Conn=Wye  Model=1 kV=2.4      kW=170   kvar=125
New Load.646 Bus1=646.2.3    Phases=1 Conn=Delta Model=2 kV=4.16    kW=230   kvar=132
New Load.692 Bus1=692.3.1    Phases=1 Conn=Delta Model=5 kV=4.16    kW=170   kvar=151
New Load.675a Bus1=675.1    Phases=1 Conn=Wye  Model=1 kV=2.4  kW=485   kvar=190
New Load.675b Bus1=675.2    Phases=1 Conn=Wye  Model=1 kV=2.4  kW=68   kvar=60
New Load.675c Bus1=675.3    Phases=1 Conn=Wye  Model=1 kV=2.4  kW=290   kvar=212
New Load.611 Bus1=611.3      Phases=1 Conn=Wye  Model=5 kV=2.4  kW=170   kvar=80
New Load.652 Bus1=652.1      Phases=1 Conn=Wye  Model=2 kV=2.4  kW=128   kvar=86
New Load.670a Bus1=670.1    Phases=1 Conn=Wye  Model=1 kV=2.4  kW=17    kvar=10
New Load.670b Bus1=670.2    Phases=1 Conn=Wye  Model=1 kV=2.4  kW=66    kvar=38
New Load.670c Bus1=670.3    Phases=1 Conn=Wye  Model=1 kV=2.4  kW=117  kvar=68
*/


new Load.671 Phases=3 Bus1=671.1.2.3 kV=4.16 kW=1155.0 Model=8 Conn=delta kvar=660.0 ZIPV=[0.0, 0.0, 1.0, 0.0, 0.0, 1.0, 0.0]
new Load.634a Phases=1 Bus1=634.1 kV=0.27713625866050806 kW=160.0 Model=8 Conn=wye kvar=110.0 ZIPV=[0.0, 0.0, 1.0, 0.0, 0.0, 1.0, 0.0]
new Load.634b Phases=1 Bus1=634.2 kV=0.27713625866050806 kW=120.0 Model=8 Conn=wye kvar=90.0 ZIPV=[0.0, 0.0, 1.0, 0.0, 0.0, 1.0, 0.0]
new Load.634c Phases=1 Bus1=634.3 kV=0.27713625866050806 kW=120.0 Model=8 Conn=wye kvar=90.0 ZIPV=[0.0, 0.0, 1.0, 0.0, 0.0, 1.0, 0.0]
new Load.645 Phases=1 Bus1=645.2 kV=2.4018475750577366 kW=170.0 Model=8 Conn=wye kvar=125.0 ZIPV=[0.0, 0.0, 1.0, 0.0, 0.0, 1.0, 0.0]
new Load.646 Phases=1 Bus1=646.2.3 kV=4.16 kW=230.0 Model=8 Conn=delta kvar=132.0 ZIPV=[1.0, 0.0, 0.0, 1.0, 0.0, 0.0, 0.0]
new Load.692 Phases=1 Bus1=692.3.1 kV=4.16 kW=170.0 Model=8 Conn=delta kvar=151.0 ZIPV=[0.0, 1.0, 0.0, 0.0, 1.0, 0.0, 0.0]
new Load.675a Phases=1 Bus1=675.1 kV=2.4018475750577366 kW=485.0 Model=8 Conn=wye kvar=190.0 ZIPV=[0.0, 0.0, 1.0, 0.0, 0.0, 1.0, 0.0]
new Load.675b Phases=1 Bus1=675.2 kV=2.4018475750577366 kW=68.0 Model=8 Conn=wye kvar=60.0 ZIPV=[0.0, 0.0, 1.0, 0.0, 0.0, 1.0, 0.0]
new Load.675c Phases=1 Bus1=675.3 kV=2.4018475750577366 kW=290.0 Model=8 Conn=wye kvar=212.0 ZIPV=[0.0, 0.0, 1.0, 0.0, 0.0, 1.0, 0.0]
new Load.611 Phases=1 Bus1=611.3 kV=2.4018475750577366 kW=170.0 Model=8 Conn=wye kvar=80.0 ZIPV=[0.0, 1.0, 0.0, 0.0, 1.0, 0.0, 0.0]
new Load.652 Phases=1 Bus1=652.1 kV=2.4018475750577366 kW=128.0 Model=8 Conn=wye kvar=86.0 ZIPV=[1.0, 0.0, 0.0, 1.0, 0.0, 0.0, 0.0]
new Load.670a Phases=1 Bus1=670.1 kV=2.4018475750577366 kW=17.0 Model=8 Conn=wye kvar=10.0 ZIPV=[0.0, 0.0, 1.0, 0.0, 0.0, 1.0, 0.0]
new Load.670b Phases=1 Bus1=670.2 kV=2.4018475750577366 kW=66.0 Model=8 Conn=wye kvar=38.0 ZIPV=[0.0, 0.0, 1.0, 0.0, 0.0, 1.0, 0.0]
new Load.670c Phases=1 Bus1=670.3 kV=2.4018475750577366 kW=117.0 Model=8 Conn=wye kvar=68.0 ZIPV=[0.0, 0.0, 1.0, 0.0, 0.0, 1.0, 0.0]


!CAPACITOR DEFINITIONS
/*
New Capacitor.Cap1 Bus1=675 phases=3 kVAR=600 kV=4.16
New Capacitor.Cap2 Bus1=611.3 phases=1 kVAR=100 kV=2.4
*/

new Capacitor.cap1 Bus1=675.1.2.3 Phases=3 NumSteps=1 kvar=[600.0000002047999] kV=4.16 Conn=wye R=[0.0] XL=[0.0] States=[1]
new Capacitor.cap2 Bus1=611.3 Phases=1 NumSteps=1 kvar=[100.15402320989499] kV=2.4018475750577366 Conn=wye R=[0.0] XL=[0.0] States=[1]

!Bus 670 is the concentrated point load of the distributed load on line 632 to 671 located at 1/3 the distance from node 632

!LINE DEFINITIONS
/*
New Line.650632    Phases=3 Bus1=RG60.1.2.3   Bus2=632.1.2.3  LineCode=mtx601 Length=2000 units=ft
New Line.632670    Phases=3 Bus1=632.1.2.3    Bus2=670.1.2.3  LineCode=mtx601 Length=667  units=ft
New Line.670671    Phases=3 Bus1=670.1.2.3    Bus2=671.1.2.3  LineCode=mtx601 Length=1333 units=ft
New Line.671680    Phases=3 Bus1=671.1.2.3    Bus2=680.1.2.3  LineCode=mtx601 Length=1000 units=ft
New Line.632633    Phases=3 Bus1=632.1.2.3    Bus2=633.1.2.3  LineCode=mtx602 Length=500  units=ft
New Line.632645    Phases=2 Bus1=632.3.2      Bus2=645.3.2    LineCode=mtx603 Length=500  units=ft
New Line.645646    Phases=2 Bus1=645.3.2      Bus2=646.3.2    LineCode=mtx603 Length=300  units=ft
New Line.692675    Phases=3 Bus1=692.1.2.3    Bus2=675.1.2.3  LineCode=mtx606 Length=500  units=ft
New Line.671684    Phases=2 Bus1=671.1.3      Bus2=684.1.3    LineCode=mtx604 Length=300  units=ft
New Line.684611    Phases=1 Bus1=684.3        Bus2=611.3      LineCode=mtx605 Length=300  units=ft
New Line.684652    Phases=1 Bus1=684.1        Bus2=652.1      LineCode=mtx607 Length=800  units=ft
*/

new Line.650632 Bus1=rg60.1.2.3 Bus2=632.1.2.3 LineCode=mtx601 Length=609.6 Phases=3 Units=m
new Line.632670 Bus1=632.1.2.3 Bus2=670.1.2.3 LineCode=mtx601 Length=203.3016 Phases=3 Units=m
new Line.670671 Bus1=670.1.2.3 Bus2=671.1.2.3 LineCode=mtx601 Length=406.2984 Phases=3 Units=m
new Line.671680 Bus1=671.1.2.3 Bus2=680.1.2.3 LineCode=mtx601 Length=304.8 Phases=3 Units=m
new Line.632633 Bus1=632.1.2.3 Bus2=633.1.2.3 LineCode=mtx602 Length=152.4 Phases=3 Units=m
new Line.632645 Bus1=632.3.2 Bus2=645.3.2 LineCode=mtx603 Length=152.4 Phases=2 Units=m
new Line.645646 Bus1=645.3.2 Bus2=646.3.2 LineCode=mtx603 Length=91.44 Phases=2 Units=m
new Line.692675 Bus1=692.1.2.3 Bus2=675.1.2.3 LineCode=mtx606 Length=152.4 Phases=3 Units=m
new Line.671684 Bus1=671.1.3 Bus2=684.1.3 LineCode=mtx604 Length=91.44 Phases=2 Units=m
new Line.684611 Bus1=684.3 Bus2=611.3 LineCode=mtx605 Length=91.44 Phases=1 Units=m
new Line.684652 Bus1=684.1 Bus2=652.1 LineCode=mtx607 Length=243.84 Phases=1 Units=m

!SWITCH DEFINITIONS

/*
New Line.671692    Phases=3 Bus1=671   Bus2=692  Switch=y  r1=1e-4 r0=1e-4 x1=0.000 x0=0.000 c1=0.000 c0=0.000
*/

new Line.671692 Switch=True Bus1=671.1.2.3 Bus2=692.1.2.3 LineCode=mtx601 Length=1.0 Phases=3 Units=m

Set Voltagebases=[115, 4.16, .48]
calcv
Solve
BusCoords IEEE13Node_BusXY.dss

export cim100

!---------------------------------------------------------------------------------------------------------------------------------------------------
!----------------Show some Results -----------------------------------------------------------------------------------------------------------------
!---------------------------------------------------------------------------------------------------------------------------------------------------


// Show Voltages LN Nodes
// Show Currents Elem
// Show Powers kVA Elem
// Show Losses
// Show Taps

!---------------------------------------------------------------------------------------------------------------------------------------------------
!---------------------------------------------------------------------------------------------------------------------------------------------------
! Alternate Solution Script
! To force the taps to be same as published results, set the transformer taps manually and disable the controls
!---------------------------------------------------------------------------------------------------------------------------------------------------

Transformer.Reg1.Taps=[1.0 1.0625]
Transformer.Reg2.Taps=[1.0 1.0500]
Transformer.Reg3.Taps=[1.0 1.06875]
Set Controlmode=OFF

Solve


/*
Transformer.Reg1.Taps=[1.0 1.0]
Transformer.Reg2.Taps=[1.0 1.0]
Transformer.Reg3.Taps=[1.0 1.0]
Set Controlmode=OFF

Solve
*/
