SetBusXY 611 100.0 0.0
SetkVBase 611 kVLN=2.4018475750577366
SetBusXY 632 250.0 200.0
SetkVBase 632 kVLN=2.4018475750577366
SetBusXY 634 250.0 400.0
SetkVBase 634 kVLN=0.27713625866050806
SetBusXY 645 250.0 100.0
SetkVBase 645 kVLN=2.4018475750577366
SetBusXY 646 250.0 0.0
SetkVBase 646 kVLN=2.4018475750577366
SetBusXY 652 0.0 100.0
SetkVBase 652 kVLN=2.4018475750577366
SetBusXY 670 200.0 200.0
SetkVBase 670 kVLN=2.4018475750577366
SetBusXY 671 100.0 200.0
SetkVBase 671 kVLN=2.4018475750577366
SetBusXY 675 100.0 400.0
SetkVBase 675 kVLN=2.4018475750577366
SetBusXY 684 100.0 100.0
SetkVBase 684 kVLN=2.4018475750577366
SetBusXY 692 100.0 250.0
SetkVBase 692 kVLN=2.4018475750577366
SetBusXY rg60 300.0 200.0
SetkVBase rg60 kVLN=2.4018475750577366
SetBusXY sourcebus 400.0 200.0
SetkVBase sourcebus kVLN=66.3972286374134
SetBusXY 633 250.0 350.0
SetkVBase 633 kVLN=2.4018475750577366
SetBusXY 650 350.0 200.0
SetkVBase 650 kVLN=2.4018475750577366
SetBusXY 680 0.0 200.0
SetkVBase 680 kVLN=2.4018475750577366
SetBusXY 611 100.0 0.0
SetkVBase 611 kVLN=2.4018475750577366
SetBusXY 632 250.0 200.0
SetkVBase 632 kVLN=2.4018475750577366
SetBusXY 634 250.0 400.0
SetkVBase 634 kVLN=0.27713625866050806
SetBusXY 645 250.0 100.0
SetkVBase 645 kVLN=2.4018475750577366
SetBusXY 646 250.0 0.0
SetkVBase 646 kVLN=2.4018475750577366
SetBusXY 652 0.0 100.0
SetkVBase 652 kVLN=2.4018475750577366
SetBusXY 670 200.0 200.0
SetkVBase 670 kVLN=2.4018475750577366
SetBusXY 671 100.0 200.0
SetkVBase 671 kVLN=2.4018475750577366
SetBusXY 675 100.0 400.0
SetkVBase 675 kVLN=2.4018475750577366
SetBusXY 684 100.0 100.0
SetkVBase 684 kVLN=2.4018475750577366
SetBusXY 692 100.0 250.0
SetkVBase 692 kVLN=2.4018475750577366
SetBusXY rg60 300.0 200.0
SetkVBase rg60 kVLN=2.4018475750577366
SetBusXY sourcebus 400.0 200.0
SetkVBase sourcebus kVLN=66.3972286374134
SetBusXY 633 250.0 350.0
SetkVBase 633 kVLN=2.4018475750577366
SetBusXY 650 350.0 200.0
SetkVBase 650 kVLN=2.4018475750577366
SetBusXY 680 0.0 200.0
SetkVBase 680 kVLN=2.4018475750577366
